// COMSOL Multiphysics 4.3 (Build: 233) model "Stator_3phase-4.mph"
// Outline of the model tree

Parameters
  delta1 = 0
  delta2 = 2*pi/3
  delta3 = 4*pi/3
  I0 = 10[A]
  Imax = sqrt(2)*I0

Couplings
  intop4: Integration on domains 6, 7
  intop5: Integration on domains 4, 9
  intop6: Integration on domains 5, 8

Geometry
  geom1 "Stator Geom" (2D, length unit in)
    c1: Circle | pos = {0, 0}; base = center; r = 4
    c2: Circle | pos = {0, 0}; type = solid; base = center; r = 3
    dif1: Difference | input = c1; input2 = c2
    r1: Rectangle | pos = {0, 0}; base = center; size = {1, 7.5}
    r2: Rectangle | pos = {0, 0}; rot = 60; base = center; size = {1, 7.5}
    r3: Rectangle | pos = {0, 0}; rot = 120; base = center; size = {1, 7.5}
    dif2: Difference | input = dif1; input2 = r2, r3, r1
    c3: Circle | pos = {0, 0}; base = center; r = 6
    c4: Circle | pos = {0, 3}; base = corner; r = 0.25
    mov1: Move | input = c4
    copy1: Copy | input = mov1
    rot1: Rotate "Coil 1" | input = mov1; rot = 60
    copy2: Copy | input = copy1
    rot2: Rotate "Coil 2" | input = copy1; rot = 120
    copy3: Copy | input = copy2
    rot3: Rotate "Coil 3" | input = copy2; rot = 180
    copy4: Copy | input = copy3
    rot4: Rotate "Coil 4" | input = copy3; rot = 240
    copy5: Copy "Coil 6" | input = copy4
    rot5: Rotate "Coil 5" | input = copy4; rot = 300
    fin: Finalize "Form Union"

Materials
  mat1 "Air" on domains 1, 3-9
    def "Basic"
      relpermeability = 1
      relpermittivity = 1
      dynamicviscosity = eta(T[1/K])[Pa*s]
      ratioofspecificheat = 1.4
      electricconductivity = 0[S/m]
      heatcapacity = Cp(T[1/K])[J/(kg*K)]
      density = rho(pA[1/Pa],T[1/K])[kg/m^3]
      thermalconductivity = k(T[1/K])[W/(m*K)]
      soundspeed = cs(T[1/K])[m/s]
      eta: Piecewise | arg = T; extrap = constant; pieces = {200.0, 1600.0, -8.38278E-7+8.35717342E-8*T^1-7.69429583E-11*T^2+4.6437266E-14*T^3-1.06585607E-17*T^4}
      Cp: Piecewise | arg = T; extrap = constant; pieces = {200.0, 1600.0, 1047.63657-0.372589265*T^1+9.45304214E-4*T^2-6.02409443E-7*T^3+1.2858961E-10*T^4}
      rho: Analytic | expr = pA*0.02897/8.314/T; args = {pA, T}; dermethod = manual; argders = {{pA, d(pA*0.02897/8.314/T,pA)}, {T, d(pA*0.02897/8.314/T,T)}}
      k: Piecewise | arg = T; extrap = constant; pieces = {200.0, 1600.0, -0.00227583562+1.15480022E-4*T^1-7.90252856E-8*T^2+4.11702505E-11*T^3-7.43864331E-15*T^4}
      cs: Analytic | expr = sqrt(1.4*287*T); args = T; dermethod = manual; argders = {T, d(sqrt(1.4*287*T),T)}
  mat2 "Soft Iron (without losses)" on domains 2
    def "Basic"
      relpermeability = MUR(normB[1/T])
      normB = sqrt(B1^2+B2^2+B3^2)
      electricconductivity = 0[S/m]
      relpermittivity = 1
      MUR: Interpolation | table = {{1, 1200}, {1.1, 820}, {1.2, 560}, {1.3, 420}, {1.4, 290}, {1.5, 220}, {1.6, 160}, {1.7, 110}, {1.8, 70}, {1.9, 47}, {2.0, 26}, {2.1, 15}, {2.2, 10}, {2.3, 7}, {2.4, 6}}; interp = linear; extrap = const
    BHCurve
      normB = BH(normH[m/A])[T]
      normH = sqrt(H1^2+H2^2+H3^2)
      BH: Interpolation
        table = {{0, 0}, {663.146, 1}, {1067.5, 1.1}, {1705.23, 1.2}, {2463.11, 1.3}, {3841.67, 1.4}, {5425.74, 1.5}, {7957.75, 1.6}, {12298.3, 1.7}, {20462.8, 1.8}, {32169.6, 1.9}, {61213.4, 2.0}, {111408, 2.1}, {175070, 2.2}, {261469, 2.3}, {318310, 2.4}}
        interp = linear
        extrap = linear
    HBCurve
      normH = HB(normB[1/T])[A/m]
      normB = sqrt(B1^2+B2^2+B3^2)
      HB: Interpolation
        table = {{0, 0}, {1, 663.146}, {1.1, 1067.5}, {1.2, 1705.23}, {1.3, 2463.11}, {1.4, 3841.67}, {1.5, 5425.74}, {1.6, 7957.75}, {1.7, 12298.3}, {1.8, 20462.8}, {1.9, 32169.6}, {2.0, 61213.4}, {2.1, 111408}, {2.2, 175070}, {2.3, 261469}, {2.4, 318310}}
        interp = linear
        extrap = linear
  mat3 "Steel AISI 4340" on domains 2
    def "Basic"
      relpermeability = 1
      electricconductivity = 4.032e6[S/m]
      thermalexpansioncoefficient = 12.3e-6[1/K]
      heatcapacity = 475[J/(kg*K)]
      relpermittivity = 1
      density = 7850[kg/m^3]
      thermalconductivity = 44.5[W/(m*K)]
    Enu "Young's modulus and Poisson's ratio"
      youngsmodulus = 205e9[Pa]
      poissonsratio = 0.28
  mat4 "Copper" on domains 4-9
    def "Basic"
      relpermeability = 1
      electricconductivity = 5.998e7[S/m]
      heatcapacity = 385[J/(kg*K)]
      relpermittivity = 1
      emissivity = 0.5
      density = 8700[kg/m^3]
      thermalconductivity = 400[W/(m*K)]
    linzRes "Linearized resistivity"
      rho0 = 1.72e-8[ohm*m]
      alpha = 3.9e-3[1/K]
      Tref = 273.15[K]

Physics
  mf: InductionCurrents "Magnetic Fields" on all domains
    dependent variable A = {Ax, Ay, Az}
    al1: AmperesLaw "Ampère's Law 1" (default)
    mi1: MagneticInsulation (default)
    init1: init "Initial Values 1" (default)
    mtcd1: MultiTurnCoilDomain on domains 6, 7 | ICoil = Imax*exp(i*delta1); CoilExcitation = CircuitVoltage
    mtcd2: MultiTurnCoilDomain on domains 5, 8 | ICoil = Imax*exp(i*delta2); CoilExcitation = CircuitVoltage
    mtcd3: MultiTurnCoilDomain on domains 4, 9 | ICoil = Imax*exp(i*delta3); CoilExcitation = CircuitVoltage
  es: Electrostatics on all domains
    dependent variable V
    ccn1: ChargeConservation (default)
    zc1: ZeroCharge (default)
    init1: init "Initial Values 1" (default)
    term1: Terminal on boundaries 37, 38, 43, 44 | TerminalType = Circuit
    term2: Terminal on boundaries 35, 36, 41, 42 | TerminalType = Circuit
    term3: Terminal on boundaries 51, 52, 54, 58 | TerminalType = Circuit
    term4: Terminal on boundaries 23, 24, 29, 31 | TerminalType = Circuit
    term5: Terminal on boundaries 49, 50, 53, 57 | TerminalType = Circuit
    term6: Terminal on boundaries 25, 26, 30, 32 | TerminalType = Circuit
  cir: Circuit "Electrical Circuit"
    gnd1: GroundNode
    IvsU1: ModelDeviceIV "External I Vs. U 1" | V_src = root.mod1.es.V0_1; Connections = {2, 0}
    IvsU2: ModelDeviceIV "External I Vs. U 2" | V_src = root.mod1.es.V0_2; Connections = {3, 0}
    V1: VoltageSource | Connections = {2, 3}; sourceType = AC; value = 230
    IvsU3: ModelDeviceIV "External I Vs. U 3" | V_src = root.mod1.es.V0_2; Connections = {4, 0}
    IvsU4: ModelDeviceIV "External I Vs. U 4" | V_src = root.mod1.es.V0_4; Connections = {5, 0}
    V2: VoltageSource | Connections = {4, 5}; sourceType = AC; value = 230; phase = 2/3*pi
    IvsU5: ModelDeviceIV "External I Vs. U 5" | V_src = root.mod1.es.V0_5; Connections = {6, 0}
    IvsU6: ModelDeviceIV "External I Vs. U 6" | V_src = root.mod1.es.V0_6; Connections = {7, 0}
    V3: VoltageSource | Connections = {6, 7}; sourceType = AC; value = 230; phase = 4/3*pi

Mesh
  mesh1 "Mesh 1" (physics-controlled)
    size: MeshSizeDefault | hauto = 5

Studies
  std1 "Study 1"
    time: Transient "Time Dependent" | tlist = range(0,0.1,1)
    freq: Frequency "Frequency Domain" | plist = 50

Solver configurations
  sol1 "Solver 1" (study std1)
    v1: Variables "Dependent Variables 1"
    t1: Time "Time-Dependent Solver 1"
      dDef: Direct
      fcDef: FullyCoupled
      prob1: SolverProblem "Information 1"
        error1: SolverError "Error 1"

Datasets
  dset1: Solution | solution = sol1

Plots
  pg1: PlotGroup2D "Magnetic Flux Density (mf)" | data = dset1
    surf1: Surface | expr = mf.normB
    con1: Contour | expr = Az

Exports
  play1: Player | sweeptype = dde